** Simulating Heat Transfer
*Heading
 Job simulates heat conduction through the block.
** Job name: HeatTransfer Model name: Heat Transfer
** Generated by: Abaqus/CAE Student Edition 2021
*Preprint, echo=NO, model=NO, history=NO, contact=NO
**
** PARTS
**
*Part, name=Block
*Node
      1,           1.,  0.400000006,           3.
      2,           1., -0.600000024,           3.
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*Element, type=DC3D8
 1,  60, 181, 265, 145,   1,  13, 109,  34
 2, 181, 182, 266, 265,  13,  14, 110, 109
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*Nset, nset=_PickedSet2, internal, generate
   1,  336,    1
*Elset, elset=_PickedSet2, internal, generate
   1,  180,    1
** Section: Block Section
*Solid Section, elset=_PickedSet2, material=Copper
,
*End Part
**
**
** ASSEMBLY
**
*Assembly, name=Assembly
**
*Instance, name=Block-1, part=Block
*End Instance
**
*Nset, nset=_PickedSet7, internal, instance=Block-1
   3,   4,   6,   7,  24,  25,  46,  47,  57,  58,  61,  62, 185, 186, 187, 188
*Elset, elset=_PickedSet7, internal, instance=Block-1
 28, 29, 30, 58, 59, 60, 88, 89, 90
*Nset, nset=_PickedSet8, internal, instance=Block-1
   9,  10,  11,  12,  74,  75,  94,  95, 105, 106, 107, 108, 261, 262, 263, 264
*Elset, elset=_PickedSet8, internal, instance=Block-1
 118, 119, 120, 148, 149, 150, 178, 179, 180
*Elset, elset=__PickedSurf9_S6, internal, instance=Block-1, generate
  1,  88,   3
*Surface, type=ELEMENT, name=_PickedSurf9, internal
__PickedSurf9_S6, S6
*Elset, elset=__PickedSurf10_S4, internal, instance=Block-1, generate
  93,  180,    3
*Surface, type=ELEMENT, name=_PickedSurf10, internal
__PickedSurf10_S4, S4
*Elset, elset=__PickedSurf11_S1, internal, instance=Block-1, generate
 151,  180,    1
*Surface, type=ELEMENT, name=_PickedSurf11, internal
__PickedSurf11_S1, S1
*End Assembly
**
** MATERIALS
**
*Material, name=Copper
*Conductivity
401.,
**
** PHYSICAL CONSTANTS
**
*Physical Constants, absolute zero=-273.15, stefan boltzmann=5.67e-08
** ----------------------------------------------------------------
**
** STEP: Heating Step
**
*Step, name="Heating Step", nlgeom=NO
Apply heat in this step.
*Heat Transfer, steady state, deltmx=0.
1., 1., 1e-05, 1.,
**
** BOUNDARY CONDITIONS
**
** Name: Constant Temp Surf 2 Type: Temperature
*Boundary
_PickedSet8, 11, 11, 350.
** Name: Constant Temperature Surface 1 Type: Temperature
*Boundary
_PickedSet7, 11, 11, 400.
**
** LOADS
**
** Name: Heat Flux   Type: Surface heat flux
*Dsflux
_PickedSurf9, S, 5000.
**
** INTERACTIONS
**
** Interaction: Convection Reaction
*Sfilm
_PickedSurf10, F, 200., 13.
** Interaction: Radiation
*Sradiate
_PickedSurf11, R, 320., 0.78
**
** OUTPUT REQUESTS
**
*Restart, write, frequency=0
**
** FIELD OUTPUT: F-Output-1
**
*Output, field, variable=PRESELECT
*Output, history, frequency=0
*End Step
