*Heading
 Simulate Heat Away
** Job name: Job-1 Model name: Model-1
** Generated by: Abaqus/CAE Student Edition 2021
*Preprint, echo=NO, model=NO, history=NO, contact=NO
**
** PARTS
**
*Part, name=Room
*Node
      1,           0.,           0.,           6.
      2,           0.,  0.548640013,           6.
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*Element, type=DC3D8
  1,  67,  68,  74,  73,   1,   2,   8,   7
  2,  68,  69,  75,  74,   2,   3,   9,   8
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*Nset, nset="Room Air", generate
   1,  594,    1
*Elset, elset="Room Air", generate
   1,  400,    1
** Section: Room Air
*Solid Section, elset="Room Air", material=Air
,
*End Part
**
**
** ASSEMBLY
**
*Assembly, name=Assembly
**
*Instance, name=Room-1, part=Room
*End Instance
**
*Nset, nset="Room Air", instance=Room-1, generate
   1,  594,    1
*Elset, elset="Room Air", instance=Room-1, generate
   1,  400,    1
*Elset, elset="_All Faces of Air_S1", internal, instance=Room-1, generate
 351,  400,    1
*Elset, elset="_All Faces of Air_S6", internal, instance=Room-1, generate
   1,  396,    5
*Elset, elset="_All Faces of Air_S2", internal, instance=Room-1, generate
  1,  50,   1
*Elset, elset="_All Faces of Air_S4", internal, instance=Room-1, generate
   5,  400,    5
*Elset, elset="_All Faces of Air_S3", internal, instance=Room-1
   1,   2,   3,   4,   5,  51
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*Elset, elset="_All Faces of Air_S5", internal, instance=Room-1
  46,  47,  48,  49,  50,  96
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*Surface, type=ELEMENT, name="All Faces of Air"
"_All Faces of Air_S1", S1
"_All Faces of Air_S6", S6
"_All Faces of Air_S2", S2
"_All Faces of Air_S4", S4
"_All Faces of Air_S3", S3
"_All Faces of Air_S5", S5
*Elset, elset=_Surf-2_S4, internal, instance=Room-1, generate
   5,  400,    5
*Surface, type=ELEMENT, name=Surf-2
_Surf-2_S4, S4
*End Assembly
**
** MATERIALS
**
** Air
**
*Material, name=Air
*Conductivity
 0.024,
*Density
 1.225,
*Specific Heat
1.,
**
** PHYSICAL CONSTANTS
**
*Physical Constants, absolute zero=-273.15, stefan boltzmann=5.67e-08, universal gas=8.31434
** ----------------------------------------------------------------
**
** STEP: Heating Step
**
*Step, name="Heating Step", nlgeom=NO
Initial Condition Step
*Heat Transfer, steady state, deltmx=0.
1., 1., 1e-05, 1.,
**
** BOUNDARY CONDITIONS
**
** Name: BC-1 Type: Temperature
*Boundary
"Room Air", 11, 11, 30.
**
** OUTPUT REQUESTS
**
*Restart, write, frequency=0
**
** FIELD OUTPUT: F-Output-1
**
*Output, field, variable=PRESELECT
*Output, history, frequency=0
*End Step
** ----------------------------------------------------------------
**
** STEP: Cooldown
**
*Step, name=Cooldown, nlgeom=NO, inc=10000
Test how heat diffuses from our assembly
*Heat Transfer, end=PERIOD, deltmx=1.
1., 1., 1e-05, 1.,
**
** INTERACTIONS
**
** Interaction: Radiate Heat Away
*Sradiate
Surf-2, R, 0., 1.
**
** OUTPUT REQUESTS
**
*Restart, write, frequency=0
**
** FIELD OUTPUT: F-Output-1
**
*Output, field, variable=PRESELECT
*Output, history, frequency=0
*End Step
